Ω := 1
V := [5; 3; 4; 4]
D(t, V) := [V[2]; V[3]; 2*Ω*V[3]; -2*Ω*V[2]]
Z := rkfixed(V, 0, 100, 1000, D)
Z = [
    0, 5, 3, 4, 4;
    0.1, 5.4372, 3.35747, 4.71493, 3.1256;
    0.2, 5.9367, 3.62095, 5.2419, 2.1266;
    0.3, 6.47859, 3.77995, 5.5599, 1.04282;
    0.4, 7.04127, 3.82812, 5.65624, -0.0825379;
    0.5, 7.6023, 3.76355, 5.5271, -1.2046;
    0.6, 8.13932, 3.5888, 5.17761, -2.27864;
    0.7, 8.63092, 3.31086, 4.62171, -3.26184;
    0.8, 9.0575, 2.94078, 3.88157, -4.115;
    0.9, 9.40205, 2.49334, 2.98668, -4.80411;
    1, 9.65085, 1.98637, 1.97273, -5.3017;
    1.1, 9.79397, 1.44007, 0.880138, -5.58794
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]
t := Z[:, 0]
x := Z[:, 1]
y := Z[:, 2]
v := Z[:, 3]
u := Z[:, 4]
# [plot: y vs x]
# [plot: u^2/2 + v^2/2 vs t]
